# РАСЧЁТ ПОЛОСОВОГО ФИЛЬТРА
# Номер варианта
N := 21
# 1. Нижняя граничная частота по уровню –3дБ:
f_1 := (12 + N)*10^3 = 33000  # Гц
# 2. Верхняя граничная частота по уровню –3дБ:
f_2 := f_1 + 0.1*N*10^3 = 35100  # Гц
# 3. Средняя частота полосы пропускания:
f_0 := sqrt(f_1*f_2) = 34033.8  # Гц
# 4. Добротность:
Q := f_0/(f_2 - f_1) = 16.2066
# 5. Значение коэффициента “α”:
α := 1/Q = 0.0617034
# 6. Принимаем значения ёмкостей конденсаторов равными друг другу:
# С_1 = С_2 = С
C := 3*10^-9  # Ф
# 7. Сопротивления всех резисторов (кроме резистора R5) принимаем
# равными друг другу:
# R_1 = R_2 = R_3= R_4= R_ос= R'_ос= R
R := 1/(2*π*f_0*C) = 1558.79  # Ом
R5 := R*(3*Q - 1) = 74229.3  # Ом
# 8. Расчёт графика АЧХ произвести следующим образом:
K_ПФ(ω)  # =
K_фвч(ω)/(ωв*τ)  # , где K_фвч определяется по формуле
τ := R*C
K_фвч(ω) := 1/sqrt((1 - 1/(ω^2*τ^2))^2 + (α/(ω*τ))^2)
# где ω - текущее значение угловой частоты ω=2πf;
# τ=RC - постоянная времени фрагментов (первого порядка) фильтра
K_ПФ(ω) := K_фвч(ω)/(ω*τ)
K_ПФ(ω) → 2.1384071*10^5/(ω*sqrt((4.5727851*10^10/ω^2 - 1)^2 + 1.7409982*10^8/ω^2))
# 9. Определение наклона амплитудно-частотной характеристики за пределами полосы пропускания.
# Для полосового фильтра наклон следует определить как для
# низкочастотного спада АЧХ, так и для высокочастотного спада.
# Для низкочастотного спада АЧХ следует взять два значения модуля
# коэффициента передачи фильтра для частот 0,5·f1 и f1.
# Обозначим их K_131 и K_231. Тогда искомый наклон на октаву равен: 20*log(K_231/K_131)
# Для высокочастотного спада АЧХ следует взять два значения модуля коэффициента передачи фильтра для частот f2 и 2·f2. Обозначим их K_132 и K_232. Тогда искомый наклон на октаву равен:
20*log(K_232/K_132)
w_1 := 2*π*0.5*f_1 = 103673
w_3 := 2*π*f_2 = 220540
w_2 := 2*π*f_1 = 207345
w_4 := 2*π*2*f_2 = 441080
K_131 := K_ПФ(w_1) = 0.633293
K_132 := K_ПФ(w_3) = 11.4598
K_231 := K_ПФ(w_2) = 11.4598
K_232 := K_ПФ(w_4) = 0.633293
Наклонслева := 20*log(K_231/K_131) = 25.1514
Наклонсправа := -20*log(K_132/K_232) = -25.1514
# По полученным данным в программе Graph были построен график АЧХ(рисунок 2). Хорошо видно, что наклон составляет именно 25.141дБ/октаву, как слева, так и справа.
# Это можно легко проверить, прологарифмировав коэффициент передачи для каждой из частот.
K_131 := 20*log(K_ПФ(w_1)) = -3.96791
K_132 := 20*log(K_ПФ(w_3)) = 21.1835
K_231 := 20*log(K_ПФ(w_2)) = 21.1835
K_232 := 20*log(K_ПФ(w_4)) = -3.96791
# Подъем от -3.968 до 21.184 слева и такой же спад справа составляют 25.141 дБ/октаву
m(n) := 2^n
n := 1, 1.001 .. 60
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n =  # no stored result
m(n) := 2^n
m(n) =  # no stored result
